# Задание начальных условий
IL[0] := 4  # А
UC[0] := 6  # В  # Аналитическое решение для тока катушки индуктивности
δt := 1/5*1 = 0.2  # с  # шаг
il(t) := 1 + 3*e^(-t)*cos(t) + 3*e^(-t)*sin(t)
# число отсчётов
5/δt = 25
n := 0 .. 25  # Аналитическое решение для напряжения конденсатора
uc(t) := 3 + 3*e^(-t)*cos(t) - 3*e^(-t)*sin(t)
# Алгоритм явного метода Эйлера
[IL[n + 1]; UC[n + 1]] := [IL[n]; UC[n]] + δt*([-1, 1; -1, -1]*[IL[n]; UC[n]] + [-2; 4])
δt = 0.2
t := 0, 0.1 .. 5
# Переходный процесс тока катушки индуктивности | Переходный процесс напряжения конденсатора
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δt := 0.2/3 = 0.0666667  # Уменьшили шаг в 3 раз
# Алгоритм явного метода Эйлера
5/δt = 75
# Рассчитываем исправленное число отсчётов
n := 0 .. 75
[IL[n + 1]; UC[n + 1]] := [IL[n]; UC[n]] + δt*([-1, 1; -1, -1]*[IL[n]; UC[n]] + [-2; 4])
t := 0, 0.1 .. 5
# Переходный процесс тока катушки индуктивности с уменьшенным шагом расчёта
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# Переходный процесс напряжения конденсатора с уменьшенным шагом расчёта
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